p := 0.4
lambda := 0.45
mu := 0.5
Given
P00 + P01 + P11 + P02 + P12 + P22 == 1
P00*lambda == P02*mu + P01*mu
P02*(mu + lambda) == P22*mu + P00*lambda*p
P22*mu == P02*lambda*p + P12*lambda*p
P12(mu + lambda*p) == P02*lambda*(1 - p) + P11*lambda*p + P01*lambda*p
P01*(lambda + mu) == P00*lambda*(1 - p) + P12*mu + P11*mu
[P00; P01; P11; P02; P12; P22] := Find(P00, P01, P11, P02, P12, P22) → [0.369003690037; 0.224001594287; 0.132909562145; 0.108101726747; 0.0934314743793; 0.0725519524053]
A1 := (P02 + P12 + P22)*mu = 0.137043
A2 := (P01 + P11)*mu = 0.178456
Q1 := (A1/(lambda*p)) = 0.761348
Q2 := (A2/(lambda*(1 - p))) = 0.660947
