p1 := 0.5
p2 := 0.5
Given
P2000 == 0
P1000 == 0
P2010 == P1000 + (1 - p2)*P1001
P1010 == p1*P2010 + p1*(1 - p2)*P2011
P2110 == p1*P1010 + p1*(1 - p2)*P1011
P1110 == p1*P2110 + p1*(1 - p2)*P2111
P2210 == p1*P1110 + p1*(1 - p2)*P1111 + p1*P1210 + p1*(1 - p2)*P1211
P1210 == p1*P2210 + p1*(1 - p2)*P2211
P1001 == (1 - p1)*P2010 + (1 - p1)*P2011
P2011 == P1001*p2 + (1 - p1)*P1011 + P1010*(1 - p1)
P1011 == P2011*p2*p1 + (1 - p1)*P2111 + P2110*(1 - p1)
P2111 == P1011*p2*p1 + (1 - p1)*P1111 + P1110*(1 - p1)
P1111 == P2111*p2*p1 + (1 - p1)*P2211 + P2210*(1 - p1)
P2211 == P1111*p2*p1 + (1 - p1*(1 - p2))*P1211 + P1210*(1 - p1)
P2000 + P1000 + P2010 + P1010 + P2110 + P1110 + P2210 + P1210 + P1001 + P2011 + P1011 + P2111 + P1111 + P2211 + P1211 == 1
[
    P2000;
    P1000;
    P2010;
    P1010;
    P2110;
    P1110;
    P2210;
    P1210;
    P1001;
    P2011;
    P1011;
    P2111;
    P1111;
    P2211;
    P1211
] := Find(P2000, P1000, P2010, P1010, P2110, P1110, P2210, P1210, P1001, P2011, P1011, P2111, P1111, P2211, P1211) → [0; 0; 0.0416666666667; 0.0520833333333; 0.0546875; 0.0553385416667; 0.0925347222222; 0.0648003472222; 0.0833333333333; 0.125; 0.114583333333; 0.111979166667; 0.111328125; 0.0741319444444; 0.0185329861111]
max(P2000, P1000, P2010, P1010, P2110, P1110, P2210, P1210, P1001, P2011, P1011, P2111, P1111, P2211, P1211) = 0.125
input_intensivity := 0.5
A := (P1001 + P2011 + P1011 + P2111 + P1111 + P2211 + P1211)*(1 - p2) = 0.319444
Lqueue := (P2110 + P1110 + P1111 + P2111) + 2*(P1210 + P2210 + P2211 + P1211) = 0.833333  # // A=абсолютная пропускная способность
Psource_fail := ((P1211 + P1210)*p1)/(P1000 + P1010 + P1110 + P1210 + P1001 + P1011 + P1111 + P1211) = 0.0833333
Pchannel_fail := ((1 - Psource_fail)*p2*(1 - p1)*(P2011 + P1011 + P2111 + P1111 + P2211 + P1211))/((1 - p1)*(P2010 + P1010 + P2110 + P1110 + P2210 + P1210 + P2011 + P1011 + P2111 + P1111 + P2211 + P1211)) = 0.277778
P := (Psource_fail + Pchannel_fail) = 0.361111
Pотк := 1 - (A/input_intensivity) = 0.361111
