p1 := 0.5
p2 := 0.5
Given
P2000 == 0
P1000 == 0
P2010 == P1000 + (1 - p2)*P1001
P1010 == p1*P2010 + p1*(1 - p2)*P2011
P2110 == p1*P1010 + p1*(1 - p2)*P1011
P1110 == p1*P2110 + p1*(1 - p2)*P2111
P2210 == p1*P1110 + p1*(1 - p2)*P1111
P1210 == p1*P2210 + p1*(1 - p2)*P2211
P1001 == (1 - p1)*P2010 + (1 - p1)*P2011
P2011 == P1001*p2 + (1 - p1)*P1011 + P1010*(1 - p1)
P1011 == P2011*p2*p1 + (1 - p1)*P2111 + P2110*(1 - p1)
P2111 == P1011*p2*p1 + (1 - p1)*P1111 + P1110*(1 - p1)
P1111 == P2111*p2*p1 + (1 - p1)*P2211 + P2210*(1 - p1)
P2211 == P1111*p2*p1 + (1 - p1 + p1*p2)*P1211 + P1210*(1 - p1)
P2000 + P1000 + P2010 + P1010 + P2110 + P1110 + P2210 + P1210 + P1001 + P2011 + P1011 + P2111 + P1111 + P2211 + P1211 == 1
[
    P2000;
    P1000;
    P2010;
    P1010;
    P2110;
    P1110;
    P2210;
    P1210;
    P1001;
    P2011;
    P1011;
    P2111;
    P1111;
    P2211;
    P1211
] := Find(P2000, P1000, P2010, P1010, P2110, P1110, P2210, P1210, P1001, P2011, P1011, P2111, P1111, P2211, P1211) → [0; 0; 0.0398231809284; 0.0497789761605; 0.0522679249686; 0.0528901621706; 0.0530457214711; 0.0530846112962; 0.0796463618569; 0.119469542785; 0.109513747553; 0.107024798745; 0.106402561543; 0.106247002243; 0.0708054082783]
P0110 + P0111 + P1000 + P1001 + P1010 + P1011 + P1110 + P1111 + P2000 + P2010 + P2011 + P2110 + P2111 =  # error: This variable is undefined.
P0110*p1 + P1110*p1 + P0111*p1*p2 + P1111*p1*p2 =  # error
P0110 + P0111 =  # error
А := (1 - P0110 - P0111 - P1011*p2*(1 - p1) - P2011*p2*(1 - p1) - P0111*p2*(1 - p1) - P2111*p2*(1 - p1))/2  # error: This variable is undefined.
А := (1 - P0110 - P0111 - P1011*p2*(1 - p1) - P2011*p2*(1 - p1))/2  # error: This variable is undefined.
